// COMSOL Multiphysics 6.2.0.339 model "Fig_4b.mph"
// Outline of the model tree

Parameters
  size_dev = 40000 [nm]
  trench_width = 1000[nm]
  delta = 0[nm]
  trench_height = 1000[nm]

Geometry
  geom1 "Geometry 1" (3D, length unit nm)
    blk1: Block "Si Ge Buffer" | pos = {0, 0, -1004.5}; base = center; size = {size_dev, size_dev, 2000}
    blk2: Block "Well" | base = center; size = {size_dev, size_dev, 9}
    blk3: Block "SiGe layer" | pos = {0, 0, 29.5}; base = center; size = {size_dev, size_dev, 50}
    blk4: Block
      pos = {-(size_dev/4+1000)+(1832/2)*0.707, (size_dev/4+1000)-(1832/2)*0.707, 4.5+50-(trench_height/2)}
      rot = 45
      base = center
      size = {trench_width, size_dev*0.707, trench_height}
    dif1: Difference | input = blk1, blk2, blk3; input2 = blk4
    blk5: Block
      pos = {(size_dev/4+1000)-(1832/2)*0.707, -(size_dev/4+1000)+(1832/2)*0.707, 4.5+50-(trench_height/2)}
      rot = 45
      base = center
      size = {trench_width, size_dev*0.707, trench_height}
    dif2: Difference | input = dif1; input2 = blk5
    wp1: WorkPlane | quickplane = yz; quickx = 3500; quickz = 3500; unite = on
    wp2: WorkPlane | quickplane = yz; quickx = -3500; unite = on
    wp3: WorkPlane | quickplane = xz; quicky = 3500; unite = on
    wp4: WorkPlane | quickplane = xz; quicky = -3500; unite = on
    pard1: PartitionDomains | domain = dif2(1) domains 1-3; workplane = wp4
    pard2: PartitionDomains | domain = pard1(1) domains 1-8; workplane = wp3
    pard3: PartitionDomains | domain = pard2(1) domains 1-13; workplane = wp2
    pard4: PartitionDomains | domain = pard3(1) domains 1-22; workplane = wp1
    fin: Finalize "Form Union"
    cmd1: CompositeDomains "Form Composite Domains 1" | input = fin(1) domains 3, 6, 9, 11, 14, 20, 23, 26, 29, 31
    cmd2: CompositeDomains "Form Composite Domains 2" | input = cmd1(1) domains 2, 5, 7, 8, 11, 16, 18, 20, 22, 23
    cmd3: CompositeDomains "Form Composite Domains 3" | input = cmd2(1) domains 1, 4, 5, 8, 12-15

Materials
  mat1: Common "Silicon" on domains 2, 4, 7
    def "Basic"
      relpermeability = 1
      electricconductivity = 1e-12[S/m]
      thermalexpansioncoefficient = 0.76e-6[1/K]
      heatcapacity = 700[J/(kg*K)]
      relpermittivity = 11.7
      density = 2329[kg/m^3]
      thermalconductivity = 130[W/(m*K)]
    Enu "Young's modulus and Poisson's ratio"
      E = 170e9[Pa]
      nu = 0.28
    RefractiveIndex
      n = 3.48
      ki = 0
  mat3: Common "SiGe" on domains 1, 3, 5, 6, 8
    def "Basic"
      density = 3332
      poissonsratio = 0.2765
      youngsmodulus = 121.77e9
      thermalexpansioncoefficient = 1.52e-6

Physics
  solid: SolidMechanics on all domains
    dependent variable u = {u, v, w}
    EquationForm.form = Automatic
    lemm1: LinearElasticModel "Linear Elastic Material 1" (default)
      iss1: InitialStressandStrain on domains 2, 4, 7 | eil = diag{-0.0127, -0.0127, 0.009856}
      te1: ThermalExpansion on all domains | minput_strainreferencetemperature = 293.15[K]; minput_temperature = 1
      act1: Activation (disabled) on domains 1, 3, 5, 6, 8 | activation_expression = True
    free1: Free (default)
    init1: init "Initial Values 1" (default)
    rms1: RigidMotionSuppression (disabled) on domains 1-8
    fix1: Fixed "Fixed Constraint 1" on boundaries 3, 26
      tefix1: ThermalExpansionFix "Thermal Expansion 1" on all boundaries
        T = 1[K]
        alphal_mat = userdef
        alphal = 0.76e-6
        Tref = 293.15[K]

Mesh
  mesh1 "Mesh 1"
    size: MeshSizeDefault | hmax = 4070; hmin = 733; hcurve = 0.6; hnarrow = 0.5; hgrad = 1.5
    ftet1: FreeTet "Free Tetrahedral 1" on domains 7, 8
      size1: Size on domains 7, 8 | hmax = 1410; hmin = 20; hauto = 2; custom = on
    ftet2: FreeTet "Free Tetrahedral 2" on domains 6
      size1: Size on domains 6 | hmax = 1420; hmin = 61.1; hauto = 2
    ftet3: FreeTet "Free Tetrahedral 3" on domains 1-4
      size1: Size on domains 1-4 | hmax = 3260; hmin = 100; hauto = 4; custom = on; hnarrow = 1
    ftet5: FreeTet "Free Tetrahedral 5" on remaining entities

Studies
  std1 "Study 1"
    param: Parametric "Parametric Sweep" (disabled) | pname = size_dev; plistarr = 60001; punit = nm
    stat: Stationary

Solver configurations
  sol1 "Solution 1" (study std1)
    v1: Variables "Dependent Variables 1"
    s1: Stationary "Stationary Solver 1"
      fc1: FullyCoupled | linsolver = d1
      d1: Direct "Suggested Direct Solver (solid)" | linsolver = pardiso; pivotperturb = 1.0E-9

Datasets
  dset1: Solution | solution = sol1
  cpl1: CutPlane "Well" | data = dset1; quickplane = xy
  cln2: CutLine2D "X=Y" | data = cpl1; method = pointdir; pddir = {1, 1}
  cln4: CutLine2D "X=-Y" | data = cpl1; method = pointdir; pddir = {-1, 1}
  cln5: CutLine2D "X cut" | data = cpl1; method = pointdir
  cln6: CutLine2D "Y cut" | data = cpl1; method = pointdir; pddir = {0, 1}
  cpl2: CutPlane "XZ cut" | data = dset1; quickplane = xz; genmethod = pointnormal; genpnvec = {-1, 1, 0}
  cln7: CutLine2D "Z cut" | data = cpl4; genpoints = {{0, -2.8e4}, {0, 2.8e4}}; pdpoint = {0, -1500}; pddir = {0, 0}
  cpl3: CutPlane "XZ cut 1" (disabled) | data = dset1; quickplane = xz
  cpl4: CutPlane | data = dset1; planetype = general; quickplane = zx; genmethod = pointnormal; genpnvec = {-1, -1, 0}

Plots
  pg10: PlotGroup3D "Strain (heterostructure)" on domains 8 | data = dset1
    surf1: Surface | expr = solid.eXY; descr = Strain tensor, XY-component
      def1: Deform "Deformation 1" | expr = {u, v, w}
  pg3: PlotGroup2D "Strain" | data = cpl1
    surf1: Surface | data = cpl1; expr = solid.eXY; descr = Strain tensor, XY-component
  pg12: PlotGroup1D "X=Y" | data = cln2; xlabel = Arc length (nm); ylabel = Strain tensor, XY component (1)
    lngr1: LineGraph "X=Y" | expr = solid.eXY; title = X=Y
  pg13: PlotGroup1D "X=-Y" | data = cln2; title = X=-Y, Etch depth=500nm
    lngr2: LineGraph "X=-Y" | data = cln4; expr = solid.eXY; title = X=-Y
  pg14: PlotGroup2D "Displacement" | data = cpl4
    surf1: Surface | expr = solid.disp; descr = Displacement magnitude
  pg15: PlotGroup1D "Z cut" | data = cln7; title = Z cut
    lngr2: LineGraph "Z cut" | data = cln7; expr = solid.eXY

Exports
  data1: Data
    data = cpl1
    expr = {solid.eXY, }
    filename = C:\Users\erikssonlab\Documents\trench_variations_COPY_2\June_6_simulations\X=Y_trench20.csv
  plot1: Plot | filename = C:\Users\erikssonlab\Documents\trench_variations_COPY_2\8123\e_xysurface_plot.csv