// COMSOL Multiphysics 6.2.0.339 model "Fig_4f_copy.mph"
// Outline of the model tree

Parameters
  size_dev = 550000[nm]
  trench_width = 50000[nm]
  trench_height = 500000[nm]

Geometry
  geom1 "Geometry 1" (3D, length unit nm)
    blk1: Block "SiGe" | pos = {0, 0, 29.5}; base = center; size = {size_dev, size_dev, 50}
    blk2: Block "Si QW" | base = center; size = {size_dev, size_dev, 9}
    blk3: Block "SiGe 2" | pos = {0, 0, -124.5}; base = center; size = {size_dev, size_dev, 240}
    blk4: Block "SiO2" | pos = {0, 0, -244.5-55}; base = center; size = {size_dev, size_dev, 110}
    blk5: Block "Si cap" | pos = {0, 0, -244.5-110-250000}; base = center; size = {size_dev, size_dev, 500000}
    blk6: Block "Trench 1"
      pos = {25000*0.707, -25000*0.707, -244.5-110-250000}
      rot = 45
      base = center
      size = {2*trench_width, trench_width, trench_height}
    blk7: Block "Si3N4"
      pos = {50000*0.707, -50000*0.707, 54.5+500}
      rot = -45
      base = center
      size = {trench_width, 2*trench_width, 1000}
    blk8: Block "Si3N4.1" (disabled)
      pos = {-50000*0.707, 50000*0.707, 54.5+500}
      rot = -45
      base = center
      size = {trench_width, 2*trench_width, 1000}
    dif1: Difference | input = blk4, blk5; input2 = blk6
    wp1: WorkPlane | quickplane = yz; quickx = 80000; unite = on
    wp5: WorkPlane
      planetype = transformed
      quickplane = yz
      quickx = 80000
      workplane = wp1
      transaxistype = y
      transrot = 45
      unite = on
    wp2: WorkPlane | quickplane = yz; quickx = -80000; unite = on
    wp6: WorkPlane
      planetype = transformed
      quickplane = yz
      quickx = -25000
      workplane = wp2
      transaxistype = y
      transrot = 45
      unite = on
    wp3: WorkPlane | quickplane = xz; quicky = -110000; unite = on
    wp7: WorkPlane
      planetype = transformed
      quickplane = xz
      quicky = -80000
      workplane = wp3
      transaxistype = y
      transrot = 45
      unite = on
    wp4: WorkPlane | quickplane = xz; quicky = 0000; unite = on
    wp8: WorkPlane
      planetype = transformed
      quickplane = xz
      quicky = 25000
      workplane = wp4
      transaxistype = y
      transrot = 45
      unite = on
    pard1: PartitionDomains
      domain = blk1(1) domains 1; blk2(1) domains 1; blk3(1) domains 1; dif1(1) domains 1, 2; blk7(1) domains 1
      workplane = wp7
    pard2: PartitionDomains
      domain = pard1(1) domains 1, 2; pard1(2) domains 1, 2; pard1(3) domains 1, 2; pard1(4) domains 1-4; pard1(5) domains 1
      workplane = wp6
    pard3: PartitionDomains
      domain = pard2(1) domains 1-4; pard2(2) domains 1-4; pard2(3) domains 1-4; pard2(4) domains 1-8; pard2(5) domains 1
      workplane = wp8
    pard4: PartitionDomains
      domain = pard3(1) domains 1-6; pard3(2) domains 1-6; pard3(3) domains 1-6; pard3(4) domains 1-12; pard3(5) domains 1
      workplane = wp5
    fin: Finalize "Form Union"
    cmd1: CompositeDomains "Form Composite Domains 1" | input = fin(1) domains 1, 2, 11, 16, 21, 26, 32, 37, 42
    cmd2: CompositeDomains "Form Composite Domains 2" | input = cmd1(1) domains 2, 3, 10, 14, 18, 27, 31, 35
    cmd3: CompositeDomains "Form Composite Domains 3" | input = cmd2(1) domains 3, 4, 9, 12, 15, 23, 26, 29
    cmd4: CompositeDomains "Form Composite Domains 4" | input = cmd3(1) domains 4, 5, 8, 10, 12, 19, 21, 23
    cmd5: CompositeDomains "Form Composite Domains 5" | input = cmd4(1) domains 5-9, 15-17
    cmd6: CompositeDomains "Form Composite Domains 6" | input = cmd5(1) domains 10

Materials
  mat1: Common "Silicon" on domains 1, 4, 8
    def "Basic"
      relpermeability = 1
      electricconductivity = 1e-12[S/m]
      thermalexpansioncoefficient = 0.76e-6[1/K]
      heatcapacity = 700[J/(kg*K)]
      relpermittivity = 11.7
      density = 2329[kg/m^3]
      thermalconductivity = 130[W/(m*K)]
    Enu "Young's modulus and Poisson's ratio"
      E = 170e9[Pa]
      nu = 0.28
    RefractiveIndex
      n = 3.48
      ki = 0
  mat2: Common "SiO2 - Silicon oxide" on domains 2, 6
    def "Basic"
      electricconductivity = 0[S/m]
      thermalexpansioncoefficient = -0.2e-6[1/K]
      heatcapacity = 730[J/(kg*K)]
      relpermittivity = 4.2
      density = 2200[kg/m^3]
      thermalconductivity = 1.4[W/(m*K)]
    Enu "Young's modulus and Poisson's ratio"
      E = 70e9[Pa]
      nu = 0.17
  mat3: Common "SiGe" on domains 3, 5, 7, 9
    def "Basic"
      density = 3332
      thermalexpansioncoefficient = 1.52e-6
      youngsmodulus = 121.77e9
      poissonsratio = 0.2765
  mat4: Common "Si3N4 - Silicon nitride" on domains 10
    def "Basic"
      electricconductivity = 0[S/m]
      thermalexpansioncoefficient = 0.5e-6[1/K]
      heatcapacity = 700[J/(kg*K)]
      relpermittivity = 9.7
      density = 3100[kg/m^3]
      thermalconductivity = 20[W/(m*K)]
    Enu "Young's modulus and Poisson's ratio"
      E = 250e9[Pa]
      nu = 0.23

Physics
  solid: SolidMechanics on all domains
    dependent variable u = {u, v, w}
    lemm1: LinearElasticModel "Linear Elastic Material 1" (default) | E_mat = from_mat
      iss1: InitialStressandStrain on domains 4, 8 | eil = diag{-0.0127, -0.0127, 0.009856}
      te1: ThermalExpansion on all domains | alpha_mat = from_mat; minput_temperature = 1[K]
      iss2: InitialStressandStrain on domains 10 | Sil = diag{10e8, 10e8, 0}; eil = 0
    free1: Free (default)
    init1: init "Initial Values 1" (default)
    fix1: Fixed "Fixed Constraint 1" on boundaries 3
      tefix1: ThermalExpansionFix "Thermal Expansion 1" on all boundaries
        T = 1[K]
        alphal_mat = userdef
        alphal = 0.76e-6
    rms1: RigidMotionSuppression (disabled) on all domains

Mesh
  mesh1 "Mesh 1"
    ftet1: FreeTet "Free Tetrahedral 1" on domains 6
      size1: Size on domains 6 | hmin = 825; hauto = 2
    swe1: Sweep "Swept 1" on domains 7, 8
      size1: Size on domains 7, 8 | hauto = 1
    ftet6: FreeTet "Free Tetrahedral 6" (disabled) on domains 7, 8
      size1: Size on domains 7, 8 | hauto = 2
    ftet2: FreeTet "Free Tetrahedral 2" on domains 9
      size1: Size on domains 9 | hmin = 825; hauto = 2
    ftet3: FreeTet "Free Tetrahedral 3" on domains 10
      size1: Size on domains 10 | hmin = 825; hauto = 2
    ftet7: FreeTet "Free Tetrahedral 7" on domains 2
      size1: Size on domains 2 | hauto = 3
    ftet4: FreeTet "Free Tetrahedral 4" on domains 3-5
      size1: Size on domains 3-5 | hmin = 2200; hauto = 3
    ftet5: FreeTet "Free Tetrahedral 5" on remaining entities
      size1: Size on entire geometry | hmin = 15400; hauto = 6

Studies
  std1 "Study 1"
    stat: Stationary

Solver configurations
  sol1 "Solution 1" (study std1)
    v1: Variables "Dependent Variables 1"
    s1: Stationary "Stationary Solver 1"
      fc1: FullyCoupled | linsolver = d1
      d1: Direct "Suggested Direct Solver (solid)" | linsolver = pardiso; pivotperturb = 1.0E-9

Datasets
  dset1: Solution | solution = sol1
  cpl1: CutPlane | data = dset1; quickplane = xy
  cln1: CutLine2D | data = cpl1; method = pointdir; genpoints = {{-20000, 20000}, {20000, 60000}}; pddir = {1, -1}
  cpl2: CutPlane | data = dset1; quickplane = xz; quickz = 54-100000; quicky = -50000*0.707
  cln2: CutLine2D | data = cpl1; genpoints = {{-1383.24, -32601}, {0, 275000}}

Tables
  mrkvl1: Table "Maximum and Minimum Values"
    // Marker
    cpl1x | cpl1y | Strain tensor, XY component (1)
    -160.205 | -34959.4 | -0.00284904
    85055.2 | -13977.2 | 0.00279748

Plots
  pg1: PlotGroup3D "Stress (solid)" | data = dset1
    surf1: Surface | expr = solid.disp
      def: Deform "Deformation" | expr = {u, v, w}; descr = Displacement field
  pg2: PlotGroup2D "2D Plot Group 2" | data = cpl1; cutlinedshash = -470370782; cutlinepgds = cln2
    surf1: Surface | expr = solid.eXY
      sel1: Selection (disabled)
    surf2: Surface (disabled) | expr = solid.disp
      hght1: Height "Height Expression 1" | expr = solid.disp
  pg3: PlotGroup1D "1D Plot Group 3" | data = cln1
    lngr1: LineGraph | expr = solid.eXY
  pg4: PlotGroup1D "1D Plot Group 4" | data = cln2
    lngr1: LineGraph | expr = solid.eXY

Exports
  data1: Data | data = dset1
  plot1: Plot | filename = C:\Users\erikssonlab\Documents\trench_variations_COPY_2\8823\r2_QW_layer.csv